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/batch
! ANSYS input file written by Workbench version 2024 R1
! File used for geometry attach: C:\Engineering Portifolio\FEA Projects in Ansys\Blotted flange analysis\Assembly.scdoc
/title,wbnew--Static Structural (A5)
/COM,/COM,     ANSYSMotion, 2024.1
/com,--- Data in consistent MKS units. See Solving Units in the help system for more information.
/units,MKS
/prep7
! Turn off shape checking because checks already performed inside WB mesher.
! See help system for more information.
SHPP,OFF,,NOWARN
etcon,set             ! allow ANSYS to choose best KEYOP's for 180x elements, resets any applicable keyopt to MAPDL defaults
/com,*********** Nodes for the whole assembly ***********
nblock,3,,96373
(1i9,3e20.9e3)
    56713    -3.962014030E-02    -9.230769231E-02     2.169177939E-02
    56714    -3.962014030E-02    -8.461538462E-02     2.169177939E-02
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-1
/com,*********** Elements for Body 1 "Component1\Solid" ***********
et,1,186
keyo,1,2,1          ! set full integration on SOLID186
eblock,19,solid,,1488
(19i9)
        1        1        1        1        0        0        0        0       20        0        1        4        6        7        8     1113     1111     1110     1109
     1908     1917     1922     1909     5544     5542     5538     5539     1912     1920     1924     1928
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-1
/com,*********** Elements for Body 2 "Component1\Solid" ***********
et,2,186
keyo,2,2,1          ! set full integration on SOLID186
eblock,19,solid,,1488
(19i9)
        2        2        2        2        0        0        0        0       20        0     1489     7093     7095     7096     7097     8202     8200     8199     8198
     8997     9006     9011     8998    12633    12631    12627    12628     9001     9009     9013     9017
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-1
/com,*********** Elements for Body 3 "Component1\Solid" ***********
et,3,186
keyo,3,2,1          ! set full integration on SOLID186
eblock,19,solid,,1488
(19i9)
        3        3        3        3        0        0        0        0       20        0     2977    14182    14184    14185    14186    15291    15289    15288    15287
    16086    16095    16100    16087    19722    19720    19716    19717    16090    16098    16102    16106
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-1
/com,*********** Elements for Body 4 "Component1\Solid" ***********
et,4,186
keyo,4,2,1          ! set full integration on SOLID186
eblock,19,solid,,1488
(19i9)
        4        4        4        4        0        0        0        0       20        0     4465    21271    21273    21274    21275    22380    22378    22377    22376
    23175    23184    23189    23176    26811    26809    26805    26806    23179    23187    23191    23195
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-1
/com,*********** Elements for Body 5 "Component1\Solid" ***********
et,5,186
keyo,5,2,1          ! set full integration on SOLID186
eblock,19,solid,,1488
(19i9)
        5        5        5        5        0        0        0        0       20        0     5953    28360    28362    28363    28364    29469    29467    29466    29465
    30264    30273    30278    30265    33900    33898    33894    33895    30268    30276    30280    30284
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-1
/com,*********** Elements for Body 6 "Component1\Solid" ***********
et,6,186
keyo,6,2,1          ! set full integration on SOLID186
eblock,19,solid,,1488
(19i9)
        6        6        6        6        0        0        0        0       20        0     7441    35449    35451    35452    35453    36558    36556    36555    36554
    37353    37362    37367    37354    40989    40987    40983    40984    37357    37365    37369    37373
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-1
/com,*********** Elements for Body 7 "Component1\Solid" ***********
et,7,186
keyo,7,2,1          ! set full integration on SOLID186
eblock,19,solid,,1488
(19i9)
        7        7        7        7        0        0        0        0       20        0     8929    42538    42540    42541    42542    43647    43645    43644    43643
    44442    44451    44456    44443    48078    48076    48072    48073    44446    44454    44458    44462
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-1
/com,*********** Elements for Body 8 "Component1\Solid" ***********
et,8,186
keyo,8,2,1          ! set full integration on SOLID186
eblock,19,solid,,1488
(19i9)
        8        8        8        8        0        0        0        0       20        0    10417    49627    49629    49630    49631    50736    50734    50733    50732
    51531    51540    51545    51532    55167    55165    55161    55162    51535    51543    51547    51551
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-1
/com,*********** Elements for Body 9 "Assembly\Solid" ***********
et,9,186
keyo,9,2,1          ! set full integration on SOLID186
eblock,19,solid,,650
(19i9)
        9        9        9        9        0        0        0        0       20        0    11905    56979    56980    57354    57355    57352    57353    57810    57860
    58770    58778    59800    58773    59796    59799    60725    59798    58772    58777    59802    59806
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-1
/com,*********** Elements for Body 10 "Assembly\Solid" ***********
et,10,186
keyo,10,2,1          ! set full integration on SOLID186
eblock,19,solid,,2084
(19i9)
       10       10       10       10        0        0        0        0       20        0    12555    60775    60781    61636    60820    62322    62320    62035    62307
    63931    63963    64158    63932    69138    68567    68565    69131    63934    63965    67429    64159
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-1
/com,*********** Elements for Body 11 "Assembly\Solid" ***********
et,11,186
keyo,11,2,1          ! set full integration on SOLID186
eblock,19,solid,,2040
(19i9)
       11       11       11       11        0        0        0        0       20        0    14639    72356    73193    73196    72812    73715    73436    73435    73563
    75834    79147    77722    75833    79738    79733    79735    80099    75835    79148    79157    77723
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-1
/com,*********** Elements for Body 12 "Assembly\Solid" ***********
et,12,186
keyo,12,2,1          ! set full integration on SOLID186
eblock,19,solid,,663
(19i9)
       12       12       12       12        0        0        0        0       20        0    16679    83508    84257    84169    84168    83663    84630    84252    84253
    84711    86655    86651    84710    85305    86836    86835    85304    84709    86847    86654    86652
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-1
/com,*********** Send User Defined Coordinate System(s) ***********
csys,0
toffst,273.15,  ! Temperature offset from absolute zero
/com,*********** Set Reference Temperature ***********
tref,22.
/com,*********** Send Materials ***********
Temperature = 'TEMP' ! Temperature
MP,DENS,1,7850,	! kg m^-3
MP,ALPX,1,1.2e-05,	! C^-1
MP,C,1,434,	! J kg^-1 C^-1
MP,KXX,1,60.5,	! W m^-1 C^-1
MP,RSVX,1,1.7e-07,	! kg m^3 A^-2 s^-3
MP,EX,1,200000000000,	! Pa
MP,NUXY,1,0.3,
MP,MURX,1,10000,

Temperature = 'TEMP' ! Temperature
MP,DENS,2,7850,	! kg m^-3
MP,ALPX,2,1.2e-05,	! C^-1
MP,C,2,434,	! J kg^-1 C^-1
MP,KXX,2,60.5,	! W m^-1 C^-1
MP,RSVX,2,1.7e-07,	! kg m^3 A^-2 s^-3
MP,EX,2,200000000000,	! Pa
MP,NUXY,2,0.3,
MP,MURX,2,10000,

Temperature = 'TEMP' ! Temperature
MP,DENS,3,7850,	! kg m^-3
MP,ALPX,3,1.2e-05,	! C^-1
MP,C,3,434,	! J kg^-1 C^-1
MP,KXX,3,60.5,	! W m^-1 C^-1
MP,RSVX,3,1.7e-07,	! kg m^3 A^-2 s^-3
MP,EX,3,200000000000,	! Pa
MP,NUXY,3,0.3,
MP,MURX,3,10000,

Temperature = 'TEMP' ! Temperature
MP,DENS,4,7850,	! kg m^-3
MP,ALPX,4,1.2e-05,	! C^-1
MP,C,4,434,	! J kg^-1 C^-1
MP,KXX,4,60.5,	! W m^-1 C^-1
MP,RSVX,4,1.7e-07,	! kg m^3 A^-2 s^-3
MP,EX,4,200000000000,	! Pa
MP,NUXY,4,0.3,
MP,MURX,4,10000,

Temperature = 'TEMP' ! Temperature
MP,DENS,5,7850,	! kg m^-3
MP,ALPX,5,1.2e-05,	! C^-1
MP,C,5,434,	! J kg^-1 C^-1
MP,KXX,5,60.5,	! W m^-1 C^-1
MP,RSVX,5,1.7e-07,	! kg m^3 A^-2 s^-3
MP,EX,5,200000000000,	! Pa
MP,NUXY,5,0.3,
MP,MURX,5,10000,

Temperature = 'TEMP' ! Temperature
MP,DENS,6,7850,	! kg m^-3
MP,ALPX,6,1.2e-05,	! C^-1
MP,C,6,434,	! J kg^-1 C^-1
MP,KXX,6,60.5,	! W m^-1 C^-1
MP,RSVX,6,1.7e-07,	! kg m^3 A^-2 s^-3
MP,EX,6,200000000000,	! Pa
MP,NUXY,6,0.3,
MP,MURX,6,10000,

Temperature = 'TEMP' ! Temperature
MP,DENS,7,7850,	! kg m^-3
MP,ALPX,7,1.2e-05,	! C^-1
MP,C,7,434,	! J kg^-1 C^-1
MP,KXX,7,60.5,	! W m^-1 C^-1
MP,RSVX,7,1.7e-07,	! kg m^3 A^-2 s^-3
MP,EX,7,200000000000,	! Pa
MP,NUXY,7,0.3,
MP,MURX,7,10000,

Temperature = 'TEMP' ! Temperature
MP,DENS,8,7850,	! kg m^-3
MP,ALPX,8,1.2e-05,	! C^-1
MP,C,8,434,	! J kg^-1 C^-1
MP,KXX,8,60.5,	! W m^-1 C^-1
MP,RSVX,8,1.7e-07,	! kg m^3 A^-2 s^-3
MP,EX,8,200000000000,	! Pa
MP,NUXY,8,0.3,
MP,MURX,8,10000,

Temperature = 'TEMP' ! Temperature
MP,DENS,9,7850,	! kg m^-3
MP,ALPX,9,1.2e-05,	! C^-1
MP,C,9,434,	! J kg^-1 C^-1
MP,KXX,9,60.5,	! W m^-1 C^-1
MP,RSVX,9,1.7e-07,	! kg m^3 A^-2 s^-3
MP,EX,9,200000000000,	! Pa
MP,NUXY,9,0.3,
MP,MURX,9,10000,

Temperature = 'TEMP' ! Temperature
MP,DENS,10,7850,	! kg m^-3
MP,ALPX,10,1.2e-05,	! C^-1
MP,C,10,434,	! J kg^-1 C^-1
MP,KXX,10,60.5,	! W m^-1 C^-1
MP,RSVX,10,1.7e-07,	! kg m^3 A^-2 s^-3
MP,EX,10,200000000000,	! Pa
MP,NUXY,10,0.3,
MP,MURX,10,10000,

Temperature = 'TEMP' ! Temperature
MP,DENS,11,7850,	! kg m^-3
MP,ALPX,11,1.2e-05,	! C^-1
MP,C,11,434,	! J kg^-1 C^-1
MP,KXX,11,60.5,	! W m^-1 C^-1
MP,RSVX,11,1.7e-07,	! kg m^3 A^-2 s^-3
MP,EX,11,200000000000,	! Pa
MP,NUXY,11,0.3,
MP,MURX,11,10000,

Temperature = 'TEMP' ! Temperature
MP,DENS,12,7850,	! kg m^-3
MP,ALPX,12,1.2e-05,	! C^-1
MP,C,12,434,	! J kg^-1 C^-1
MP,KXX,12,60.5,	! W m^-1 C^-1
MP,RSVX,12,1.7e-07,	! kg m^3 A^-2 s^-3
MP,EX,12,200000000000,	! Pa
MP,NUXY,12,0.3,
MP,MURX,12,10000,

!************************* Model Summary ********************
!Component1\Solid,	Structural Steel,	matid,	1
!Component1\Solid,	Structural Steel,	matid,	2
!Component1\Solid,	Structural Steel,	matid,	3
!Component1\Solid,	Structural Steel,	matid,	4
!Component1\Solid,	Structural Steel,	matid,	5
!Component1\Solid,	Structural Steel,	matid,	6
!Component1\Solid,	Structural Steel,	matid,	7
!Component1\Solid,	Structural Steel,	matid,	8
!Assembly\Solid,	Structural Steel,	matid,	9
!Assembly\Solid,	Structural Steel,	matid,	10
!Assembly\Solid,	Structural Steel,	matid,	11
!Assembly\Solid,	Structural Steel,	matid,	12
!************************* End Model Summary ********************
/com,*********** Create Contact "Contact Region 2" ***********
*set,tid,14
*set,cid,13
r,tid
r,cid
et,tid,170
et,cid,174
eblock,10,,,45
(15i9)
    29714       14       14       14        0    56917    56919    56948    56948    58591    58597    56948    58592
    29715       14       14       14        0    56924    56923    56887    56887    58606    58511    56887    58512
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-1
eblock,10,,,45
(15i9)
    29759       13       13       13        0    56917    56919    56948    56948    58591    58597    56948    58592
    29760       13       13       13        0    56924    56923    56887    56887    58606    58511    56887    58512
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-1
eblock,10,,,94
(15i9)
    29804       13       14       13        0    62320    62035    62307    62322    68567    68565    69131    69138
    29805       13       14       13        0    62035    62308    62118    62034    68566    68801    68563    68561
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-1
eblock,10,,,94
(15i9)
    29898       14       13       14        0    62320    62035    62307    62322    68567    68565    69131    69138
    29899       14       13       14        0    62035    62308    62118    62034    68566    68801    68563    68561
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-1
keyo,cid,8,2               ! auto create asymmetric contact (from Program Controlled setting)
keyo,cid,10,0              ! adjust contact stiffness each NR iteration (from Program Controlled setting)
keyo,cid,12,5              ! bonded always
keyo,cid,18,1              ! small sliding turned on by application
keyo,cid,2,2               ! MPC for bonded contacts (from Program Controlled setting)
keyo,tid,5,0               ! Automatic constraint type detection
keyo,cid,4,2               ! on nodal point - normal to target surface (from Program Controlled setting)
keyo,cid,9,1               ! ignore initial gaps/penetration
keyo,cid,7,0               ! No Prediction
rmod,tid,3,10.      ! FKN
rmod,tid,5,0.       ! ICONT
rmod,tid,6,0.       ! PINB
rmod,tid,10,0.      ! CNOF
rmod,tid,12,0.      ! FKT
rmod,tid,36,71      ! WB DSID
rmod,cid,3,10.      ! FKN
rmod,cid,5,0.       ! ICONT
rmod,cid,6,0.       ! PINB
rmod,cid,10,0.      ! CNOF
rmod,cid,12,0.      ! FKT
rmod,cid,36,71      ! WB DSID
/com,*********** Create Contact "Contact Region 3" ***********
*set,tid,16
*set,cid,15
r,tid
r,cid
et,tid,170
et,cid,174
eblock,10,,,45
(15i9)
    29992       16       16       16        0    57859    57352    57860    57860    59797    59798    57860    60774
    29993       16       16       16        0    57328    57829    57327    57327    59753    59751    57327    59750
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-1
eblock,10,,,45
(15i9)
    30037       15       15       15        0    57859    57352    57860    57860    59797    59798    57860    60774
    30038       15       15       15        0    57328    57829    57327    57327    59753    59751    57327    59750
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-1
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eblock,10,,,90
(15i9)
    30172       16       15       16        0    73728    73525    73729    73729    79997    79998    73729    80391
    30173       16       15       16        0    73489    73526    73525    73525    79895    79996    73525    79894
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-1
keyo,cid,8,2               ! auto create asymmetric contact (from Program Controlled setting)
keyo,cid,10,0              ! adjust contact stiffness each NR iteration (from Program Controlled setting)
keyo,cid,12,5              ! bonded always
keyo,cid,18,1              ! small sliding turned on by application
keyo,cid,2,0               ! augmented Lagrange (from Program Controlled setting)
keyo,cid,4,0               ! on Gauss point (from Program Controlled setting)
keyo,cid,9,1               ! ignore initial gaps/penetration
keyo,cid,7,0               ! No Prediction
rmod,tid,3,10.      ! FKN
rmod,tid,5,0.       ! ICONT
rmod,tid,6,0.       ! PINB
rmod,tid,10,0.      ! CNOF
rmod,tid,12,0.      ! FKT
rmod,tid,36,74      ! WB DSID
rmod,cid,3,10.      ! FKN
rmod,cid,5,0.       ! ICONT
rmod,cid,6,0.       ! PINB
rmod,cid,10,0.      ! CNOF
rmod,cid,12,0.      ! FKT
rmod,cid,36,74      ! WB DSID
/com,*********** Create Contact "Contact Region 5" ***********
*set,tid,18
*set,cid,17
r,tid
r,cid
et,tid,170
et,cid,174
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eblock,10,,,45
(15i9)
    30495       18       17       18        0    83714    83713    83704    83704    85443    85420    83704    85421
    30496       18       17       18        0    83686    83685    83737    83737    85366    85367    83737    85370
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-1
keyo,cid,8,2               ! auto create asymmetric contact (from Program Controlled setting)
keyo,cid,10,0              ! adjust contact stiffness each NR iteration (from Program Controlled setting)
keyo,cid,12,5              ! bonded always
keyo,cid,18,1              ! small sliding turned on by application
keyo,cid,2,2               ! MPC for bonded contacts (from Program Controlled setting)
keyo,tid,5,0               ! Automatic constraint type detection
keyo,cid,4,2               ! on nodal point - normal to target surface (from Program Controlled setting)
keyo,cid,9,1               ! ignore initial gaps/penetration
keyo,cid,7,0               ! No Prediction
rmod,tid,3,10.      ! FKN
rmod,tid,5,0.       ! ICONT
rmod,tid,6,0.       ! PINB
rmod,tid,10,0.      ! CNOF
rmod,tid,12,0.      ! FKT
rmod,tid,36,80      ! WB DSID
rmod,cid,3,10.      ! FKN
rmod,cid,5,0.       ! ICONT
rmod,cid,6,0.       ! PINB
rmod,cid,10,0.      ! CNOF
rmod,cid,12,0.      ! FKT
rmod,cid,36,80      ! WB DSID
nsel,all
esel,all
/com,*********** Fixed Supports ***********
CMBLOCK,_FIXEDSU,NODE,      214
(8i10)
     56857     56858     56859     56860     56861     56862     56863     56864
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cmsel,s,_FIXEDSU
d,all,all
nsel,all
/com,*********** Define Pressure Using Surface Effect Elements "Pressure" ***********
et,19,154
mat,19
eblock,10,,,403
(15i9)
    30540       19       19       19        0    57281    57312    56949    56920    59660    58659    58600    58601
    30541       19       19       19        0    57311    57324    57323    56951    59717    59742    58664    58663
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-1
esel,s,type,,19
keyop,19,7,0                ! Use deformed area for application of load
esel,all
/com,*********** Define Pressure Using Surface Effect Elements "Pressure 2" ***********
et,20,154
mat,20
eblock,10,,,403
(15i9)
    30943       20       20       20        0    84585    84616    83707    83678    87540    85431    85346    85348
    30944       20       20       20        0    84615    84628    84627    84255    87570    87583    86841    86840
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-1
esel,s,type,,20
keyop,20,7,0                ! Use deformed area for application of load
esel,all
/com,*********** Create nodes required for Bolt Pretension loads ***********
n,87613,0.,0.,0.
/com,*********** Create Bolt Pretension "Bolt Pretension 2" ***********
*set,_pretnode,87613
_nbolt101 = 87613               ! that will be the pretension node number
local,11,1,0.,0.,0.,90.,0.,0.
nmod,87613,0,0,0,,,,1      ! move pretension node to bolt center, don't update centroid
*set,_tid,21
et,_tid,179
type,_tid
real,_tid
mat,_tid
secnum,_tid
esel,s,type,,1
esel,a,type,,8
esel,a,type,,7
esel,a,type,,2
esel,a,type,,3
esel,a,type,,6
esel,a,type,,5
esel,a,type,,4
*set,_wbpstol,1.60623787873515e-004
*get,_echck1,elem,,num,max    ! make sure psmesh command was successful
psmesh,_tid,,87613,all,,11,z,0.0,,_wbpstol,_tid,cmebolt,cmnbolt
*get,_echck2,elem,,num,max    ! make sure psmesh command was successful
*if,_echck1,eq,_echck2,then
  *msg,error
  THE PRETENSION LOAD WAS NOT ABLE TO BE APPLIED. &
  MAKE SURE THE LOAD WAS NOT APPLIED TO A HOLE AND THAT &
  THE LOAD IS NOT APPLIED MORE THAN ONCE PER SURFACE
*endif
esel,all
nsel,all
csys,0
esel,all
fini
/com,****************************************************************************
/com,*************************    SOLUTION       ********************************
/com,****************************************************************************
/solu
antype,0                   ! static analysis
_thickRatio=0.833   ! Ratio of thick parts in the model
eqsl,pcg,1e-8,,,,,,1
cntr,print,1               ! print out contact info and also make no initial contact an error
cncheck,dmp		!	Enable program controlled contact splitting for distributed memory parallel run
dmpoption,emat,no             ! Don't combine emat file for DANSYS
dmpoption,esav,no             ! Don't combine esav file for DANSYS
nldiag,cont,iter           ! print out contact info each equilibrium iteration
rescontrol,,none                 ! Do not keep any restart files
/com,****************************************************
/com,******************* SOLVE FOR LS 1 OF 2 ****************
esel,s,type,,19
nsle
sf,all,pres,2000000.
esel,s,type,,20
nsle
sf,all,pres,2000000.
nsel,all
esel,all
esel,all
f,87613,fx,10000.
nsub,1,1,1
time,1.
outres,erase
outres,all,none
outres,nsol,all,
outres,rsol,all
outres,eangl,all
outres,etmp,all
outres,veng,all
outres,strs,all,
outres,epel,all,
outres,eppl,all,
outres,cont,all,
! *********** WB SOLVE COMMAND ***********
! check interactive state
*get,ANSINTER_,active,,int
*if,ANSINTER_,ne,0,then
/eof
*endif
solve
/com *************** Write FE CONNECTORS *********
CEWRITE,file,ce,,INTE
/com,****************************************************
/com,*************** FINISHED SOLVE FOR LS 1 *************
/com,****************************************************
/com,******************* SOLVE FOR LS 2 OF 2 ****************
esel,all
f,87613,fx,0.
nsub,1,1,1
time,2.
outres,erase
outres,all,none
outres,nsol,all,
outres,rsol,all
outres,eangl,all
outres,etmp,all
outres,veng,all
outres,strs,all,
outres,epel,all,
outres,eppl,all,
outres,cont,all,
solve
/com,****************************************************
/com,*************** FINISHED SOLVE FOR LS 2 *************
*get,_NSOLTHREADS,active,0,ntfs
*get,_NSOLPROCESSES,active,0,npfs
*get,_PCGITER,active,,solu,cgiter
/post1
fini
